# ============================================================
# Thermodynamic Integration - Electrostatics
# Decoupling charges: lambda_c 1.0 -> 0.0
# Lambda value: {{ lambda_c }}
# ============================================================

##############################################
###              Variables                 ###
##############################################

variable       T               equal      {{ temp }}
variable       T_damp          equal      {{ temp_damp }}
variable       P               equal      {{ press }}
variable       P_damp          equal      {{ press_damp }}
variable       seed            equal      {{ random_seed }}

variable       lambda_vdw      equal      {{ lambda_vdw }}
variable       lambda_c        equal      {{ lambda_c }}
variable       lambda_diff     equal      {{ lambda_diff }}
variable       nlambda_diff    equal     -{{ lambda_diff }}

##############################################
###           General Settings             ###
##############################################

units           {{ units }}
atom_style      {{ atom_style }}
boundary        p p p
kspace_style    {{ kspace_style }}
neighbor        2.0 bin
neigh_modify    delay 0 every 1 check yes
{% if kspace_style != 'none' and kspace_modify != 'none' %}kspace_modify   {{ kspace_modify }} {% endif %}

##############################################
###              Read Data                 ###
##############################################

read_data      {{ input_data }}

##############################################
###           Model Definition             ###
##############################################

pair_style      {{ pair_style }}
{% if pair_modify != "none" %}pair_modify     {{ pair_modify }} {% endif %}
bond_style      {{ bond_style }}
angle_style     {{ angle_style }}
dihedral_style  {{ dihedral_style }}
improper_style  {{ improper_style }}
{% if special_bonds != 'none' %}special_bonds   {{ special_bonds }} {% endif %}

include         system_packed.in.settings
include         system_packed.in.charges

##############################################
###                Groups                ###
##############################################

group           solute   molecule 1
group           solvent  subtract all solute

fix          q0 all store/state 0 q
variable     qscaled atom f_q0*v_lambda_c
set          group solute charge v_qscaled

##############################################
###         Charge Modification          ###
##############################################

# --- Compute dU/dL using central difference---
{{ delta_charge_block }}

# --- Compute dU/dL using central difference---
compute         FEPf all fep ${T} &
{{ fep_elec_forward }}

compute         FEPb all fep ${T} &
{{ fep_elec_backward }}

variable        dUdL equal (c_FEPf[1]-c_FEPb[1])/(2.0*v_lambda_diff)

##############################################
###       Dynamics / Minimization          ###
##############################################

{% if free_energy == 'gibbs' %}
fix             NPT all npt temp ${T} ${T} ${T_damp} iso ${P} ${P} ${P_damp}
{% elif free_energy == 'helmholtz' %}
fix             NVT all nvt temp ${T} ${T} ${T_damp}
{% endif %}

fix             dUdL_avg all ave/time 1 100 100 v_dUdL

# --- Track box dimensions during simulation ---
variable        xdim            equal      lx
variable        ydim            equal      ly
variable        zdim            equal      lz
fix             boxlens all ave/time 1 {{ ti_steps // 2 }} {{ ti_steps // 2 }} v_xdim v_ydim v_zdim

thermo          100
thermo_style    custom step temp press density vol etotal econserve ke pe ecoul elong v_dUdL f_dUdL_avg v_lambda_c
dump            1 all custom 1000 traj.lammpstrj id type xu yu zu
dump_modify     1 sort id

timestep        {{ timestep }}
run             {{ ti_steps }}

variable        avg_xdim equal f_boxlens[1]
variable        avg_ydim equal f_boxlens[2]
variable        avg_zdim equal f_boxlens[3]

change_box      all x final 0.0 ${avg_xdim} y final 0.0 ${avg_ydim} z final 0.0 ${avg_zdim} remap

##############################################
###             Save Restart               ###
##############################################

write_data      {{ output_data }} nocoeff
